<neuroml xmlns="http://www.neuroml.org/schema/neuroml2"  xmlns:xs="http://www.w3.org/2001/XMLSchema" xmlns:xsi="http://www.w3.org/2001/XMLSchema-instance" xsi:schemaLocation="http://www.neuroml.org/schema/neuroml2 https://raw.github.com/NeuroML/NeuroML2/development/Schemas/NeuroML2/NeuroML_v2.3.1.xsd" id="KC_doc">
    <include href="channels/pas.channel.nml"/>
    <include href="channels/kv.channel.nml"/>
    <include href="channels/ka.channel.nml"/>
    <include href="channels/kst.channel.nml"/>
    <include href="channels/naf.channel.nml"/>
    <include href="channels/nas.channel.nml"/>
    <cell id="KC">
        <annotation>

            <rdf:RDF
              xmlns:orcid="https://orcid.org/"
              xmlns:rdf="http://www.w3.org/1999/02/22-rdf-syntax-ns#"
              xmlns:dc="http://purl.org/dc/elements/1.1/"
              xmlns:dcterms="http://purl.org/dc/terms/"
              xmlns:bqbiol="http://biomodels.net/biology-qualifiers/"
              xmlns:bqmodel="http://biomodels.net/model-qualifiers/"
              xmlns:foaf="http://xmlns.com/foaf/0.1/"
            >
              <rdf:Description rdf:about="KC">
                <dc:title>Kenyon cell model</dc:title>
                <dc:description>Subhasis Ray, Zane N Aldworth, Mark A Stopfer (2020) Feedback inhibition and its control in an insect olfactory circuit eLife 9:e53281.</dc:description>
                <bqbiol:encodes>
                  <rdf:Bag>
                    <rdf:li rdf:resource="http://uri.neuinfo.org/nif/nifstd/nlx_147420"/>
                  </rdf:Bag>
                </bqbiol:encodes>
                <dc:source>
                  <rdf:Bag>
                    <rdf:li rdf:resource="https://modeldb.science/262670"/>
                    <rdf:li rdf:resource="https://github.com/OpenSourceBrain/262670"/>
                    <rdf:li rdf:resource="https://v1.opensourcebrain.org/projects/locust-mushroom-body"/>
                  </rdf:Bag>
                </dc:source>
                <bqmodel:isDescribedBy>
                  <rdf:Bag>
                    <rdf:li rdf:resource="https://doi.org/10.7554/eLife.53281"/>
                  </rdf:Bag>
                </bqmodel:isDescribedBy>
                <dc:creator>
                  <rdf:Bag>
                    <rdf:li rdf:resource="#Subhasis_Ray"/>
                  </rdf:Bag>
                </dc:creator>
                <dc:contributor>
                  <rdf:Bag>
                    <rdf:li rdf:resource="#Ankur_Sinha"/>
                  </rdf:Bag>
                </dc:contributor>
                <dcterms:created>
                  <rdf:Description>
                    <dcterms:W3CDTF>2024-04-25</dcterms:W3CDTF>
                  </rdf:Description>
                </dcterms:created>
              </rdf:Description>
              <rdf:Description rdf:about="#Ankur_Sinha">
                <foaf:name>Ankur Sinha</foaf:name>
                <orcid:id rdf:resource="https://orcid.org/0000-0001-7568-7167"/>
              </rdf:Description>
              <rdf:Description rdf:about="#Subhasis_Ray">
                <foaf:name>Subhasis Ray</foaf:name>
                <orcid:id rdf:resource="https://orcid.org/0000-0003-2566-7146"/>
              </rdf:Description>
            </rdf:RDF>

        </annotation>
        <morphology id="morphology">
            <segment id="0" name="Seg0">
                <proximal x="0.0" y="0.0" z="0.0" diameter="20.0"/>
                <distal x="0.0" y="0.0" z="6.366" diameter="20.0"/>
            </segment>
            <segmentGroup id="soma_group" neuroLexId="GO:0043025">
                <notes>Default soma segment group for the cell</notes>
                <member segment="0"/>
            </segmentGroup>
            <segmentGroup id="all">
                <notes>Default segment group for all segments in the cell</notes>
                <member segment="0"/>
            </segmentGroup>
        </morphology>
        <biophysicalProperties id="biophys">
            <membraneProperties>
                <channelDensity id="pas" ionChannel="pas" condDensity="9.75e-5 S_per_cm2" erev="-70 mV" ion="non_specific"/>
                <channelDensity id="kv" ionChannel="kv" condDensity="1.5e-3 S_per_cm2" erev="-81 mV" ion="k"/>
                <channelDensity id="ka" ionChannel="ka" condDensity="1.4525e-2 S_per_cm2" erev="-81 mV" ion="k"/>
                <channelDensity id="kst" ionChannel="kst" condDensity="2.0275e-3 S_per_cm2" erev="-81 mV" ion="k"/>
                <channelDensity id="naf" ionChannel="naf" condDensity="3.5e-2 S_per_cm2" erev="58 mV" ion="na"/>
                <channelDensity id="nas" ionChannel="nas" condDensity="3e-3 S_per_cm2" erev="58 mV" ion="na"/>
                <spikeThresh value="-10mV"/>
                <specificCapacitance value="1 uF_per_cm2"/>
                <initMembPotential value="-70mV"/>
            </membraneProperties>
            <intracellularProperties>
                <resistivity value="35.4 ohm_cm"/>
            </intracellularProperties>
        </biophysicalProperties>
    </cell>
</neuroml>
